// COMSOL Multiphysics 6.3.0.290 model "声-PDMS薄膜2.mph"
// Outline of the model tree

Selections
  sel1: Explicit "PML" on domains 1-5, 7, 8, 10-12, 14-19
  sel2: Explicit "映射" on boundaries 1, 2, 4, 5, 7, 8, 11, 14, 15, 18, 21-23, 25, 28, 30, 37, 44-46, 55, 58, 67, 74-82

Coordinate systems
  pml1: PML "完美匹配层 1" on domains 1-8, 10-12, 14-19

Geometry
  geom1 "几何 1" (3D, length unit µm)
    blk1: Block "长方体 1"
      size = {10, 10, 10}
      layername = 层 1
      layer = 0.5
      layernameold = 层 1
      layerleft = on
      layerright = on
      layerfront = on
      layerback = on
      layerbottom = off
      layertop = on
    wp1: WorkPlane "工作平面 1" | unite = on
      c1: Circle "圆 1" | pos = {5, 5}
    blk2: Block "长方体 2" (disabled)
      size = {9, 9, 10}
      pos = {0.5, 0.5, 0}
      layername = 层 1
      layer = 0.5
      layernameold = 层 1
      layerbottom = off
      layertop = on
    blk3: Block "PDMS薄膜" | size = {1, 1, 0.003}; base = center; pos = {5, 5, 5}
    fin: Finalize "形成联合体"

Materials
  mat1: Common "Water, liquid" (disabled) on all domains
    def: def "Basic"
      thermalexpansioncoefficient = alpha_p(T)
      bulkviscosity = muB(T)
      dynamicviscosity = eta(T)
      ratioofspecificheat = gamma_w(T)
      electricconductivity = 5.5e-6[S/m]
      heatcapacity = Cp(T)
      density = rho(T)
      thermalconductivity = k(T)
      soundspeed = cs(T)
      eta: Piecewise
        arg = T
        pieces = 
          {273.15, 413.15, 1.3799566804-0.021224019151*T^1+1.3604562827E-4*T^2-4.6454090319E-7*T^3+8.9042735735E-10*T^4-9.0790692686E-13*T^5+3.8457331488E-16*T^6}
          {413.15, 553.75, 0.00401235783-2.10746715E-5*T^1+3.85772275E-8*T^2-2.39730284E-11*T^3}
        argunit = K
        fununit = Pa*s
      Cp: Piecewise | arg = T; pieces = {273.15, 553.75, 12010.1471-80.4072879*T^1+0.309866854*T^2-5.38186884E-4*T^3+3.62536437E-7*T^4}; argunit = K; fununit = J/(kg*K)
      rho: Piecewise
        arg = T
        smooth = contd1
        pieces = 
          {273.15, 293.15, 6.3092789034e-05*T^3-0.0603676398829*T^2+18.9229382407066*T-950.704055329848}
          {293.15, 373.15, 1.0335053319e-05*T^3-0.0133950656345*T^2+4.96928883266*T+432.257114008512}
        argunit = K
        fununit = kg/m^3
      k: Piecewise | arg = T; pieces = {273.15, 553.75, -0.869083936+0.00894880345*T^1-1.58366345E-5*T^2+7.97543259E-9*T^3}; argunit = K; fununit = W/(m*K)
      cs: Interpolation
        funcnametable = {cs, 1}
        table = {{273, 1403}, {278, 1427}, {283, 1447}, {293, 1481}, {303, 1507}, {313, 1526}, {323, 1541}, {333, 1552}, {343, 1555}, {353, 1555}, {363, 1550}, {373, 1543}}
        interp = piecewisecubic
        fununit = m/s
        argunit = K
      an1: Analytic | funcname = alpha_p; expr = -1/rho(T)*d(rho(T),T); args = T; fununit = 1/K; argunit = K
      an2: Analytic | funcname = gamma_w; expr = 1+(T/Cp(T))*(alpha_p(T)*cs(T))^2; args = T; fununit = 1; argunit = K
      an3: Analytic | funcname = muB; expr = 2.79*eta(T); args = T; fununit = Pa*s; argunit = K
  mat2: Common "PDMS - Polydimethylsiloxane" on domains 13
    def: def "Basic"
      thermalexpansioncoefficient = 9e-4[1/K]
      heatcapacity = 1460[J/(kg*K)]
      relpermittivity = 2.75
      density = 970[kg/m^3]
      thermalconductivity = 0.16[W/(m*K)]
    Enu: Enu "Young's modulus and Poisson's ratio"
      E = 750[kPa]
      nu = 0.49
  mat3: Common "Muscle" on domains 1-12, 14-19
    def: def "Basic"
      heatcapacity = 3421[J/(kg*K)]
      density = 1090[kg/m^3]
      thermalconductivity = 0.49[W/(m*K)]
      soundspeed = 1580
    Enu: Enu "杨氏模量和泊松比"
      E = 82000
      nu = 0.49

Physics
  acpr: PressureAcoustics "压力声学，频域" on domains 1-12, 14-19
    dependent variable p
    fpam1: FrequencyPressureAcousticsModel "压力声学 1" (default)
    shb1: SoundHard "硬声场边界（壁） 1" (default)
    init1: init "初始值 1" (default)
    nacc1: NormalAcceleration "法向加速度 1" (disabled) on boundaries 47 | nacc = 100000
    ndisp1: NormalDisplacement "法向位移 1" on boundaries 47 | ndisp = 0.0001
  solid: SolidMechanics "固体力学" on domains 13
    dependent variable u = {u, v, w}
    lemm1: LinearElasticModel "线弹性材料 1" (default)
    free1: Free "自由 1" (default)
    init1: init "初始值 1" (default)
    fix1: Fixed "固定约束 1" on boundaries 48, 53

Multiphysics
  asb1: AcousticStructureBoundary "声-结构边界 1" on all boundaries | Acoustics_physics = acpr; Structure_physics = solid

Mesh
  mesh1 "网格 1"
    size: MeshSizeDefault "大小" | hmin = 0.18; hcurve = 0.6; hnarrow = 0.5; hgrad = 1.5
    map1: Map "映射 1" on selection sel2
      dis1: Distribution "分布 1" on edges 7, 8, 23, 27, 29, 82, 103, 106, 108, 118
      dis2: Distribution "分布 2" on edges 9, 13, 17, 30, 35, 54, 57, 112 | numelem = 20
    swe1: Sweep "扫掠 1" on domains 1-8, 10-12, 14-19
    map2: Map "映射 2" on boundaries 48-53
      dis1: Distribution "分布 1" on edges 61, 66, 71, 74 | numelem = 3
      dis2: Distribution "分布 2" on edges 64, 65 | numelem = 30
    swe2: Sweep "扫掠 2" on domains 13
    ftri1: FreeTri "自由三角形网格 1" on boundaries 47
      size1: Size "大小 1" on boundaries 47 | hauto = 2
    ftet1: FreeTet "自由四面体网格 1" on remaining entities
      size1: Size "大小 1" on entire geometry | hauto = 3

Studies
  std1 "研究 1"
    param: Parametric "参数化扫描" (disabled) | pname = {, }; punit = {, }
    freq: Frequency "频域" | punit = kHz; plist = 70 range(40,30,100)

Solver configurations
  sol1 "解 1" (study std1)
    v1: Variables "因变量 1"
    s1: Stationary "稳态求解器 1"
      p1: Parametric "参数化 1"
      fc1: FullyCoupled "全耦合 1"
      d1: Direct "Suggested Direct Solver (asb1) (已合并)"
  sol2 "参数化解 1" (study std1)

Datasets
  dset1: Solution | solution = sol1
  dset2: Solution | solution = sol2

Plots
  pg1: PlotGroup3D "声压 (acpr)" | data = dset1
    surf1: Surface "表面 1" (disabled) | expr = acpr.p_t
    mslc1: Multislice "多切面 1" | expr = acpr.p_t
  pg2: PlotGroup3D "声压级 (acpr)" | data = dset1
    surf1: Surface "表面 1" (disabled) | expr = acpr.Lp_t
    mslc1: Multislice "多切面 1" | expr = acpr.Lp_t; descr = 总声压级
  pg3: PlotGroup3D "声压，等值面 (acpr)" | data = dset1
    iso1: Isosurface "等值面 1" | expr = acpr.p_t
  pg4: PlotGroup3D "三维绘图组 4" | data = dset1
    surf1: Surface "表面 1" | expr = solid.disp; unit = µm; descr = 位移大小
      def1: Deform "变形 1" | expr = {u, v, w}